*HEADING
**
** File created at Mon Sep 09 15:54:16 2019
**
** This template extracts the FEModeler mesh in a format
** compatible with ABAQUS input.
**
** MESH NODES
**
** Number of nodes 194
*NODE
       1,    1.673059221E+003,    4.000000000E+003,    0.000000000E+000
       2,    0.000000000E+000,    4.000000000E+003,    0.000000000E+000
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**
** MESH ELEMENTS
**
*ELEMENT, TYPE=S8R
1, 53, 5, 70, 3, 83, 84, 78, 77
2, 54, 21, 5, 53, 132, 82, 83, 178
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**
** MATERIAL PROPERTIES
**
*MATERIAL, NAME=Structural Steel
*ELASTIC, TYPE=ISOTROPIC
200000., 0.3
*DENSITY
7.85e-006
*EXPANSION, TYPE=ISO
1.2e-005
*SPECIFIC HEAT
434000.
**
*STEP
**
** Loads and Boundary Conditions would go here
**
*ENDSTEP
** End of Data
